// COMSOL Multiphysics 5.5.0.359 model "Comsol2pics_add_curl_curv.mph"
// Outline of the model tree

Parameters
  Re = 100  // Reynolds number
  mu0 = 0.00282[Pa*s]  // Dynamic viscosity
  rho0 = 1056.5 [kg/m^3]  // Density
  meshsz = 0.0000005[mm]  // Mesh size

Variables
  var1 "Var-s 2 write to .csv"
    vlct_1 = aveop1(u)  // average flow velocitie through the boundary
    vlct_2 = aveop2(u)  // average flow velocitie through the boundary
    vlct_3 = aveop3(u)  // average flow velocitie through the boundary
    vlct_4 = aveop4(u)  // average flow velocitie through the boundary
    vlct_5 = aveop5(u)  // average flow velocitie through the boundary
    vlct_side = aveop6(u)  // average flow velocitie through the boundary
    vlct_main = aveop7(u)  // average flow velocitie through the boundary
    curv = maxop1(abs(u^2 * vx - v^2 * uy + u*v*(vy - ux))/(u^2 + v^2)^1.5)  // curvature objective function term
    curl = maxop1(uy) + maxop1(vx)

Selections
  sel1: Explicit "Inlet" on boundaries 1
  sel2: Explicit "Outlet" on boundaries 82
  com1: Complement "All walls" | entitydim = 1; input = {sel1, sel2}

Couplings
  aveop1: Average "Average vlct_1" on boundaries 71
  aveop2: Average "Average vlct_2" on boundaries 65
  aveop3: Average "Average vlct_3" on boundaries 58
  aveop4: Average "Average vlct_4" on boundaries 38
  aveop5: Average "Average vlct_5" on boundaries 27
  aveop6: Average "Average vlct_side" on boundaries 54
  aveop7: Average "Average vlct_main" on boundaries 32
  maxop1: Maximum on domains 1, 2

Geometry
  geom1 "Geometry 1" (2D, length unit µm)
    imp1: Import | type = dxf; filename = C:\Users\pics out of Comsol TASK finl.dxf
    spl1: Split | input = imp1
    uni1: Union | input = spl1(1), spl1(2), spl1(3); intbnd = off; edge = all
    del1: Delete "Delete Entities 1"
      input = spl1(7) domains 1; spl1(9) domains 1; spl1(8) domains 1; spl1(6) domains 1; spl1(5) domains 1; spl1(4) domains 1
    ls1: LineSegment "vlct_1 LINE" | vertex1 = uni1(1) points 57; vertex2 = uni1(1) points 56
    ls2: LineSegment "vlct_2 LINE" | vertex1 = uni1(1) points 51; vertex2 = uni1(1) points 50
    ls3: LineSegment "vlct_3 LINE" | vertex1 = uni1(1) points 45; vertex2 = uni1(1) points 44
    ls4: LineSegment "vlct_4 LINE" | vertex1 = uni1(1) points 27; vertex2 = uni1(1) points 26
    ls5: LineSegment "vlct_5 LINE" | vertex1 = uni1(1) points 19; vertex2 = uni1(1) points 18
    ls6: LineSegment "vlct_side LINE" | vertex1 = uni1(1) points 41; vertex2 = uni1(1) points 47
    ls7: LineSegment "vlct_main LINE" | vertex1 = uni1(1) points 22; vertex2 = uni1(1) points 31
    pol1: Polygon
      contributeto = csel3
      table = {{100, 200}, {300, 400}, {500, 600}, {700, 800}}
      x = {1, 2, 3, 4, 5}
      y = {6, 7, 8, 9, 11}
    pol2: Polygon
      contributeto = csel3
      table = {{100, 200}, {300, 400}, {500, 600}, {700, 800}}
      x = {1, 2, 3, 4, 5}
      y = {6, 7, 8, 9, 11}
    pol3: Polygon
      contributeto = csel3
      table = {{100, 200}, {300, 400}, {500, 600}, {700, 800}}
      x = {1, 2, 3, 4, 5}
      y = {6, 7, 8, 9, 11}
    pol4: Polygon
      contributeto = csel3
      table = {{100, 200}, {300, 400}, {500, 600}, {700, 800}}
      x = {1, 2, 3, 4, 5}
      y = {6, 7, 8, 9, 11}
    dif1: Difference | input = uni1; input2 = selection csel3
    fin: Finalize "Form Union"

Materials
  mat1: Common "Water, liquid" on domains 1, 2
    def "Basic"
      thermalexpansioncoefficient = alpha_p(T)
      bulkviscosity = muB(T)
      dynamicviscosity = eta(T)
      ratioofspecificheat = gamma_w(T)
      electricconductivity = 5.5e-6[S/m]
      heatcapacity = Cp(T)
      density = 1056.5
      thermalconductivity = k(T)
      soundspeed = cs(T)
      eta: Piecewise
        arg = T
        pieces = 
          {273.15, 413.15, 1.3799566804-0.021224019151*T^1+1.3604562827E-4*T^2-4.6454090319E-7*T^3+8.9042735735E-10*T^4-9.0790692686E-13*T^5+3.8457331488E-16*T^6}
          {413.15, 553.75, 0.00401235783-2.10746715E-5*T^1+3.85772275E-8*T^2-2.39730284E-11*T^3}
        argunit = K
        fununit = Pa*s
      Cp: Piecewise | arg = T; pieces = {273.15, 553.75, 12010.1471-80.4072879*T^1+0.309866854*T^2-5.38186884E-4*T^3+3.62536437E-7*T^4}; argunit = K; fununit = J/(kg*K)
      rho: Piecewise
        arg = T
        smooth = contd1
        pieces = 
          {273.15, 293.15, 6.3092789034e-05*T^3-0.0603676398829*T^2+18.9229382407066*T-950.704055329848}
          {293.15, 373.15, 1.0335053319e-05*T^3-0.0133950656345*T^2+4.96928883266*T+432.257114008512}
        argunit = K
        fununit = kg/m^3
      k: Piecewise | arg = T; pieces = {273.15, 553.75, -0.869083936+0.00894880345*T^1-1.58366345E-5*T^2+7.97543259E-9*T^3}; argunit = K; fununit = W/(m*K)
      cs: Interpolation | table = {{273, 1403}, {278, 1427}, {283, 1447}, {293, 1481}, {303, 1507}, {313, 1526}, {323, 1541}, {333, 1552}, {343, 1555}, {353, 1555}, {363, 1550}, {373, 1543}}; interp = piecewisecubic; argunit = K; fununit = m/s
      an1: Analytic | funcname = alpha_p; expr = -1/rho(T)*d(rho(T),T); args = T; argunit = K; fununit = 1/K
      an2: Analytic | funcname = gamma_w; expr = 1+(T/Cp(T))*(alpha_p(T)*cs(T))^2; args = T; argunit = K; fununit = 1
      an3: Analytic | funcname = muB; expr = 2.79*eta(T); args = T; argunit = K; fununit = Pa*s

Physics
  spf: LaminarFlow on domains 1, 2
    dependent variable u = {u, v, w}
    fp1: FluidProperties (default)
    init1: init "Initial Values 1" (default) | p_init = 0
    wallbc1: WallBC "Wall 1" (default)
    inl1: InletBoundary "Inlet 1" on boundaries 1 | U0in = 0.01
    out1: OutletBoundary "Outlet 1" on boundaries 82

Mesh
  mesh1 "Mesh 1" (physics-controlled)
    size: MeshSizeDefault | table = cfd; hauto = 4

Studies
  std1 "Study 1"
    opt: Optimization (disabled)
    stat: Stationary

Solver configurations
  sol1 "Solution 1" (study std1)
    v1: Variables "Dependent Variables 1"
    s1: Stationary "Stationary Solver 1"
      fc1: FullyCoupled | linsolver = d1; initstep = 0.01; maxiter = 100
      d1: Direct "Direct, fluid flow variables (spf)" | linsolver = pardiso; pivotperturb = 1.0E-13
  sol2 "Parametric Solutions 1" (study std1)

Datasets
  dset1: Solution | solution = sol1
  dset2: Solution | solution = sol2

Derived values
  gev1: EvalGlobal "Global Evaluation 1"
    data = dset1
    table = tbl3
    expr = {vlct_1, vlct_2, vlct_3, vlct_4, vlct_5, vlct_side, vlct_main, curv, curl}
    unit = {m/s, m/s, m/s, m/s, m/s, m/s, m/s, 1/m, 1/s}
    descr = {, , , , , , , curvature objective function term, }

Tables
  tbl3: Table
    // Global Evaluation 1 {gev1}
    vlct_1 (m/s) | vlct_2 (m/s) | vlct_3 (m/s) | vlct_4 (m/s) | vlct_5 (m/s) | vlct_side (m/s) | vlct_main (m/s) | vlct_1 (m/s) | vlct_2 (m/s) | vlct_3 (m/s) | vlct_4 (m/s) | vlct_5 (m/s)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
    0.000553491 | 0.000608786 | 0.000839695 | 0.000719038 | 0.00059576 | 0.00211701 | 0.0286447 | 0.000562574 | 0.000612584 | 0.000840472 | 0.000717183 | 0.000589079

Plots
  pg1: PlotGroup2D "Velocity (spf)" | data = dset1
    surf1: Surface | expr = spf.U
  pg2: PlotGroup2D "Pressure (spf)" | data = dset1
    con1: Contour | expr = p
  pg3: PlotGroup2D "Geometry" | data = dset1
    surf1: Surface | expr = 1
  pg4: PlotGroup1D "1D Plot Group 4" | data = none
    tblp1: Table "Table Graph 1" | table = tbl3